# OpenSim document version 30000
Model dancing_dude:
  credits: Conlain Kelly
  publications: For testing
  length_units: meters
  force_units: N
  gravity: 0 -9.80665 0
  BodySet:
    Body ground: mass=0 mass_center=(0 0 0) inertia_xx=0 inertia_yy=0 inertia_zz=0 meshes=Unassigned
    Body rod1: mass=1 mass_center=(0 0 0) inertia_xx=1 inertia_yy=1 inertia_zz=1 meshes=(cylinder.vtp sphere.vtp)
      PinJoint pin1: parent_body=ground location_in_parent=(0 0 0) location=(0 .5 0)
        Coordinate q1: motion_type=rotational default_value=0.7853982 range=(-1.570796 1.570796) clamped=false
    Body rod2: mass=1 mass_center=(0 0 0) inertia_xx=1 inertia_yy=1 inertia_zz=1 meshes=(cylinder.vtp sphere.vtp)
      PinJoint pin2: parent_body=rod1 location_in_parent=(-.5 0 0) location=(0 0.5 0)
        Coordinate q2: motion_type=rotational default_value=2 range=(-1.570796 1.570796) clamped=false
    Body rod3: mass=1 mass_center=(0 0 0) inertia_xx=1 inertia_yy=1 inertia_zz=1 meshes=(cylinder.vtp sphere.vtp)
      PinJoint pin3: parent_body=rod1 location_in_parent=(.5 0 0) location=(0 .5 0)
        Coordinate q1: motion_type=rotational default_value=1.112388 range=(-1.570796 1.570796) clamped=false
    Body rod4: mass=1 mass_center=(0 0 0) inertia_xx=1 inertia_yy=1 inertia_zz=1 meshes=(cylinder.vtp sphere.vtp)
      PinJoint pin3: parent_body=rod1 location_in_parent=(0 0 0) location=(0 1 0)
        Coordinate q1: motion_type=rotational default_value=1.112388 range=(-1.570796 1.570796) clamped=false
    Body rod5: mass=1 mass_center=(0 0 0) inertia_xx=1 inertia_yy=1 inertia_zz=1 meshes=(cylinder.vtp sphere.vtp)
      PinJoint pin3: parent_body=rod4 location_in_parent=(.5 0 0) location=(0 .5 0)
        Coordinate q1: motion_type=rotational default_value=1.112388 range=(-1.570796 1.570796) clamped=false
    Body rod6: mass=1 mass_center=(0 0 0) inertia_xx=1 inertia_yy=1 inertia_zz=1 meshes=(cylinder.vtp sphere.vtp)
      PinJoint pin4: parent_body=rod4 location_in_parent=(-.5 0 0) location=(0 .5 0)
        Coordinate q1: motion_type=rotational default_value=1.112388 range=(-1.570796 1.570796) clamped=false
  MarkerSet:
    Marker body1: rod1 (0 0 0)
    Marker body2: rod2 (0 0 0)
    Marker body3: rod3 (0 0 0)
