# OpenSim document version 30000
Model test:
  credits: Conlain Kelly
  publications: For testing
  length_units: meters
  force_units: N
  gravity: 0 -9.80665 0
  BodySet:
    Body ground: mass=0 mass_center=(0 0 0) inertia_xx=0 inertia_yy=0 inertia_zz=0 meshes=Unassigned
    Body rod1: mass=1 mass_center=(0 0 0) inertia_xx=1 inertia_yy=1 inertia_zz=1 meshes=(cylinder.vtp sphere.vtp)
      UniversalJoint pin1: parent_body=ground location_in_parent=(-2 2 4) orientation_in_parent=(1 2 0)
          location=(3.141593 -.5 0) orientation=(1.57 .767 2)
        Coordinate q1: motion_type=rotational default_value=0.2112388 range=(-1.570796 1.570796) clamped=false
        Coordinate q2: motion_type=rotational default_value=-1 range=(-1.570796 1.570796) clamped=false
  MarkerSet:
    Marker body1: rod1 (0 0 0)
